**  © Ihor Mirzov, July 2019.
**  Distributed under GNU General Public License, version 2.
**
** Empty lines and comments are ignored. No spaces after punctuation symbols!
** Padding with exactly 1 tab is mandatory - it defines nesting.
**
** CalculiX keywords start with '*'. If keyword ends with '__newline'
** it means that all arguments should and will be written from a new line.
** '__' in the line's end is needed just for correct highlighting in vscode -
** parser removes it
**
** Parameters start with ','. Parameter values go after '=' and are separated by '|'.
** Usually parameter ends with '='. Parameters without '=' are just keys.
** Plus '+' means parameters go together. '|' means parameters are mutually exclusive.
** No '__required' flag means that parameter is optional. Argument's default value
** should come first.


Model__group

	Parameters__group
		*HEADING
		*DESIGN VARIABLES,TYPE__required=COORDINATE|ORIENTATION
		*PHYSICAL CONSTANTS,ABSOLUTE ZERO=,STEFAN BOLTZMANN=,NEWTON GRAVITY=__
		*VALUES AT INFINITY
		*SUBMODEL,TYPE__required=SURFACE|NODE,INPUT__required=,GLOBAL ELSET=__
			*DSLOAD,SUBMODEL__required,STEP__required=__

	Mesh__group
		*NODE,NSET=__
		*NSET,NSET__required=,GENERATE
		*ELEMENT,TYPE=C3D4|C3D6|C3D8|C3D8R|C3D10|C3D15|C3D20R|DC3D4|DC3D6|DC3D8|DC3D10|DC3D15|DC3D20|S6|S8|S8R|CPS6|CPS8|CPS8R|CPE6|CPE8|CPE8R|CAX6|CAX8|CAX8R|B32|B32R|D|GAPUNI
			*USER ELEMENT,TYPE__required=,INTEGRATION POINTS__required=,MAXDOF__required=,NODES__required=__
		*ELSET,ELSET__required=,GENERATE
		*SURFACE,NAME__required=,TYPE=ELEMENT|NODE
		*GAP,ELSET__required=__

	Properties__group
		*NODAL THICKNESS
		*NORMAL
		*MASS,ELSET__required=__
		*SPRING,ELSET__required=,NONLINEAR,ORIENTATION=__
		*DASHPOT,ELSET__required=__
		*MATERIAL,NAME__required=__
			*CONDUCTIVITY,TYPE=ISO|ORTHO|ANISO
			*CREEP,LAW=NORTON|USER
			*CYCLIC HARDENING
			*DAMPING,ALPHA=,BETA=,STRUCTURAL__required=__
			*DEFORMATION PLASTICITY
			*DENSITY
			*DEPVAR
			*ELASTIC,TYPE=ISO|ORTHO|ENGINEERING CONSTANTS|ANISO
			*ELECTRICAL CONDUCTIVITY
			*EXPANSION,TYPE=ISO|ORTHO|ANISO,ZERO=__
			*FLUID CONSTANTS
			*HYPERELASTIC,ARRUDA-BOYCE|MOONEY-RIVLIN|NEO HOOKE|OGDEN|POLYNOMIAL|REDUCED POLYNOMIAL|VANDERWAALS|YEOH,N=1|2|3
			*HYPERFOAM,N=__
			*MAGNETIC PERMEABILITY
			*PLASTIC,HARDENING=ISOTROPIC|KINEMATIC|COMBINED|USER
			*SPECIFIC GAS CONSTANT
			*SPECIFIC HEAT
			*USER MATERIAL,CONSTANTS__required=,TYPE=MECHANICAL|THERMAL

		Section__group
			*BEAM SECTION,ELSET__required=,MATERIAL__required=,SECTION__required=RECT|CIRC|PIPE|BOX,ORIENTATION,OFFSET1,OFFSET2,NODAL THICKNESS
			*FLUID SECTION,ELSET__required=,MATERIAL__required=,TYPE=,OIL,CONSTANTS
			*MEMBRANE SECTION
			*SHELL SECTION,ELSET__required=,MATERIAL|COMPOSITE__required=,ORIENTATION=,NODAL THICKNESS=,OFFSET=__
			*SOLID SECTION,ELSET__required=,MATERIAL__required=,ORIENTATION
			*PRE-TENSION SECTION,SURFACE__required=,ELEMENT__required=,NODE__required=__

	*ORIENTATION,NAME__required=,SYSTEM=RECTANGULAR|CYLINDRICAL
	*TRANSFORM,NSET__required=,TYPE=R|C
	*TRANSFORMF,SURFACE__required=,TYPE=R|C
	*AMPLITUDE,NAME__required=,TIME= |TOTAL TIME,USER,SHIFTX=,SHIFTY=__
	*BOUNDARY,OP=,AMPLITUDE=,TIME DELAY,LOAD CASE,USER,MASS FLOW,FIXED,SUBMODEL,STEP=,DATA SET
	*INCLUDE,INPUT__required=__
	*INITIAL CONDITIONS,TYPE__required=DISPLACEMENT|FLUID VELOCITY|MASS FLOW|PLASTIC STRAIN|PRESSURE|SOLUTION|STRESS|TEMPERATURE|TOTAL PRESSURE|VELOCITY,USER
	*RESTART,READ__required,STEP=__
	*TIME POINTS,NAME__required=,TIME=TOTAL TIME,GENERATE

	Interactions__group
		*CONTACT PAIR,INTERACTION__required=,TYPE__required=NODE TO SURFACE|SURFACE TO SURFACE,SMALL SLIDING,ADJUST
		*CLEARANCE,MASTER__required,SLAVE__required,VALUE__required
		*SURFACE INTERACTION,NAME__required=__
			*SURFACE BEHAVIOR,PRESSURE-OVERCLOSURE__required=EXPONENTIAL|LINEAR|TABULAR|TIED|HARD
				*FRICTION
				*GAP CONDUCTANCE,USER
				*CONTACT DAMPING,TANGENT FRACTION
				*GAP HEAT GENERATION,USER

	Constraints__group
		*EQUATION
		*MPC__newline,PLANE|STRAIGHT|BEAM
		*NETWORK MPC
		*RIGID BODY,NSET|ELSET__required=,REF NODE,ROT NODE
		*COUPLING,REF NODE__required,SURFACE__required,CONSTRAINT NAME__required,ORIENTATION
		*DISTRIBUTING
		*DISTRIBUTING COUPLING,ELSET__required=__
		*KINEMATIC
		*TIE,NAME__required=,POSITION TOLERANCE=,ADJUST,CYCLIC SYMMETRY|MULTISTAGE|FLUID PERIODIC|FLUID CYCLIC
		*CYCLIC SYMMETRY MODEL,N__required,NGRAPH,TIE__required,ELSET,CHECK=YES|NO

	*STEP,PERTURBATION,NLGEOM,INC=,INCF=,THERMAL NETWORK,AMPLITUDE=RAMP|STEP

		Analysis type__group
			*NO ANALYSIS
			*BUCKLE,SOLVER__required=SPOOLES|PARDISO|SGI|TAUCS
			*CFD,STEADY STATE,TIME RESET,TOTAL TIME AT START,COMPRESSIBLE,TURBULENCE MODEL=NONE|K-EPSILON|K-OMEGA|SST,SCHEME=UD|MODSMART,SIMPLEC
			*COUPLED TEMPERATURE-DISPLACEMENT,SOLVER=SPOOLES|PARDISO|SGI|TAUCS|ITERATIVE CHOLESKY|ITERATIVE SCALING,DIRECT,ALPHA=,STEADY STATE,DELTMX,TIME RESET,TOTAL TIME AT START,COMPRESSIBLE
			*DYNAMIC,DIRECT,ALPHA=,EXPLICIT,SOLVER=SPOOLES|PARDISO|SGI|TAUCS|ITERATIVE CHOLESKY|ITERATIVE SCALING
			*ELECTROMAGNETICS,SOLVER=SPOOLES|PARDISO|SGI|TAUCS|ITERATIVE CHOLESKY|ITERATIVE SCALING,DIRECT,MAGNETOSTATICS,DELTMX=,TIME RESET,TOTAL TIME AT START,NO HEAT TRANSFER
			*FREQUENCY,SOLVER=SPOOLES|PARDISO|SGI|TAUCS,MATRIXSTORAGE,STORAGE=YES|NO,GLOBAL=YES|NO,CYCMPC=ACTIVE|INACTIVE
				*SELECT CYCLIC SYMMETRY MODES,NMIN=,NMAX=__
			*COMPLEX FREQUENCY,CORIOLIS__required
			*GREEN,SOLVER=PARDISO|SPOOLES
			*HEAT TRANSFER,SOLVER=SPOOLES|PARDISO|SGI|TAUCS|ITERATIVE CHOLESKY|ITERATIVE SCALING,MATRIXSTORAGE,DIRECT,STEADY STATE,FREQUENCY,MODAL DYNAMIC,STORAGE=YES|NO,DELTMX,TIME RESET,TOTAL TIME AT START
				*VIEWFACTOR,READ,INPUT,WRITE|WRITE ONLY,OUTPUT,NO CHANGE
			*MODAL DYNAMIC,SOLVER=SPOOLES|PARDISO|SGI|TAUCS,DIRECT=NO|YES,DELTMX,STEADY STATE
				*BASE MOTION,DOF__required=,AMPLITUDE__required=,TYPE=ACCELERATION|DISPLACEMENT
			*SENSITIVITY,NLGEOM,READ,WRITE
				*CONSTRAINT,DISPLACEMENT,EIGENFREQUENCY,MASS,SHAPEENERGY,STRESS,THICKNESS,FIXGROWTH,FIXSHRINKAGE
				*OBJECTIVE__newline,DISPLACEMENT,EIGENFREQUENCY,GREEN,MASS,SHAPEENERGY,STRESS
					*FILTER,TYPE=LINEAR|QUADRATIC|CUBIC,BOUNDARY WEIGHTING=YES|NO,EDGE PRESERVATION=YES|NO,DIRECTION WEIGHTING=YES|NO
			*STATIC,SOLVER=SPOOLES|PARDISO|SGI|TAUCS|ITERATIVE CHOLESKY|ITERATIVE SCALING,DIRECT,EXPLICIT,TIME RESET,TOTAL TIME AT START
				*TEMPERATURE,OP=NEW|MOD,AMPLITUDE=,TIME DELAY=,USER,SUBMODEL+STEP+DATA SET

			*STEADY STATE DYNAMICS,HARMONIC=YES|NO,SOLVER=SPOOLES|PARDISO|SGI|TAUCS
				*BASE MOTION,DOF__required,AMPLITUDE__required,TYPE=ACCELERATION|DISPLACEMENT
			*SUBSTRUCTURE GENERATE,SOLVER=SPOOLES|PARDISO
				*SUBSTRUCTURE MATRIX OUTPUT,FILE NAME__required=,STIFFNESS=YES,OUTPUT FILE=USER DEFINED
				*RETAINED NODAL DOFS,SORTED=NO
			*UNCOUPLED TEMPERATURE-DISPLACEMENT,SOLVER=SPOOLES|PARDISO|SGI|TAUCS|ITERATIVE CHOLESKY|ITERATIVE SCALING,DIRECT,ALPHA=,STEADY STATE,DELTMX=,EXPLICIT,TIME RESET,TOTAL TIME AT START=__
			*VISCO,SOLVER=SPOOLES|PARDISO|SGI|TAUCS|ITERATIVE CHOLESKY|ITERATIVE SCALING,DIRECT,EXPLICIT,TIME RESET,TOTAL TIME AT START,CETOL=__

		Field Output__group
			*EL FILE,FREQUENCY|FREQUENCYF|TIME POINTS=,GLOBAL=YES|NO,OUTPUT=2D|3D,SECTION FORCES,NSET,LAST ITERATIONS,CONTACT ELEMENTS
			*ELEMENT OUTPUT
			*EL PRINT,ELSET__required=,FREQUENCY|FREQUENCYF|TIME POINTS=,TOTALS=YES|ONLY|NO,GLOBAL=YES|NO
			*NODE FILE,NSET=,FREQUENCY|FREQUENCYF|TIME POINTS=,GLOBAL=YES|NO,OUTPUT=2D|3D,LAST ITERATIONS,CONTACT ELEMENTS
			*NODE OUTPUT,FREQUENCY=,TIME POINTS=__
			*NODE PRINT,NSET=,FREQUENCY|FREQUENCYF|TIME POINTS=,TOTALS=YES|ONLY|NO,GLOBAL=YES|NO
			*CONTACT FILE,FREQUENCY,TIME POINTS,LAST ITERATIONS,CONTACT ELEMENTS
			*CONTACT OUTPUT,FREQUENCY,TIME POINTS,LAST ITERATIONS,CONTACT ELEMENTS
			*CONTACT PRINT,FREQUENCY,TIME POINTS,TOTALS=YES|ONLY|NO
			*SECTION PRINT,SURFACE__required=,NAME__required=,FREQUENCYF|TIME POINTS=,SOF,SOM,SOAREA

		Load & BC__group
			*BOUNDARY,OP,AMPLITUDE,TIME DELAY,LOAD CASE,USER,MASS FLOW,FIXED,SUBMODEL,STEP,DATA SET
			*BOUNDARYF,AMPLITUDE,TIME DELAY,USER
			*MASS FLOW
			*CLOAD,OP=NEW|MOD,AMPLITUDE,TIME DELAY,USER,LOAD CASE,SECTOR,SUBMODEL,STEP,DATA SET,OMEGA0
			*DLOAD,OP=NEW|MOD,AMPLITUDE,TIME DELAY,LOAD CASE,SECTOR
			*CFLUX,OP=NEW|MOD,AMPLITUDE,TIME DELAY,USER,ADD
			*DFLUX,OP=NEW|MOD,AMPLITUDE,TIME DELAY
			*RADIATE,OP=NEW|MOD,AMPLITUDE,TIME DELAY,RADIATION AMPLITUDE,RADIATION TIME DELAY,ENVNODE,CAVITY
			*FILM,OP=NEW|MOD,AMPLITUDE,TIME DELAY,FILM AMPLITUDE,FILM TIME DELAY
			*MODAL DAMPING,RAYLEIGH|MODAL=DIRECT

		Change__group
			*INITIAL STRAIN INCREASE
			*CHANGE FRICTION,INTERACTION__required
				*FRICTION
			*CHANGE MATERIAL,NAME__required=__
			*CHANGE PLASTIC,HARDENING=ISOTROPIC|KINEMATIC
			*CHANGE SURFACE BEHAVIOR,INTERACTION__required
			*CHANGE SOLID SECTION,ELSET__required=,MATERIAL__required=,ORIENTATION
			*MODEL CHANGE,TYPE__required=ELEMENT|CONTACT PAIR,ADD=STRAIN FREE|WITH STRAIN,REMOVE

		*CONTROLS,PARAMETERS=TIME INCREMENTATION|FIELD|LINE SEARCH|NETWORK|CFD|CONTACT,RESET
		*EQUATION,REMOVE|REMOVE ALL
		*INCLUDE,INPUT__required
		*REFINE MESH,LIMIT=__
		*RESTART,WRITE__required,FREQUENCY=,OVERLAY
		*END STEP
