*Heading
    Default_model_for_CalculiX_Advanced_Environment
**
** NODES
**
*Node
    1,          -3.,          -1.,           0.
    2,          -3.,          -1.,          -1.
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*Nset, nset=ALL_n, generate
    1, 116, 1
*Nset, nset=C3D4
    1,   2,   3,   4,   5,   6
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*Nset, nset=C3D6
    1,   4,   5,   7,  11,  14
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*Nset, nset=C3D8
    1,   4,   5,   7,  24,  31
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*Nset, nset=C3D10
    2,   3,   6,   8,   9,  10
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*Nset, nset=C3D15, generate
    1,  116,    1
*Nset, nset=C3D20
    33, 34, 35, 36, 37, 42
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**
** ELEMENTS
**
*Element, type=C3D4
    2, 73, 53, 51, 52
    10, 101,  74,  73,  75
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*Element, type=C3D6
    6, 52, 51, 73, 44, 43, 68
    7, 75, 73, 101, 69, 68, 95
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*Element, type=C3D8
    4, 51, 73, 68, 43, 72, 101, 95, 67
    22, 45, 65, 64, 37, 47, 93, 92, 68
    23, 24, 55, 62, 34, 57, 77, 84, 64
    24, 31, 66, 67, 35, 32, 82, 91, 62
    49, 5, 7, 43, 37, 1, 4, 35, 34
    56, 111, 104, 84, 92, 114, 110, 91, 95
*Element, type=C3D10
    5, 115, 74, 69, 71, 102, 75, 96, 97, 76, 70
    16, 89, 99, 94, 112, 98, 100, 90, 109, 116, 113
    17, 6, 49, 42, 40, 21, 48, 17, 16, 50, 41
    18, 20, 53, 44, 8, 54, 52, 46, 19, 22, 18
    72, 88, 78, 86, 106, 81, 80, 87, 108, 103, 107
    73, 3, 25, 36, 39, 12, 29, 11, 15, 30, 38
    74, 13, 23, 33, 2, 27, 28, 26, 9, 10, 14
    75, 105, 56, 63, 60, 79, 59, 85, 83, 58, 61
*Element, type=C3D15
    1, 99, 94, 112, 74, 69, 115, 100, 113, 116, 75, 96, 102, 101, 95, 114
    13, 49, 42, 40, 99, 94, 89, 48, 41, 50, 100, 90, 98, 72, 67, 66
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*Element, type=C3D20
    3, 44, 36, 33, 42, 69, 86, 63, 94, 37, 34, 35, 43, 92, 84, 91,
    95, 68, 64, 62, 67
*Elset, elset=ALL_e, generate
    1, 75, 1
*Elset, elset=C3D4
    2, 10, 11, 12, 19, 20
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*Elset, elset=C3D6
    6, 7, 8, 9, 25, 26
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*Elset, elset=C3D8
    4, 22, 23, 24, 49, 56
*Elset, elset=C3D10
    5, 16, 17, 18, 72, 73, 74, 75
*Elset, elset=C3D15
    1, 13, 14, 15, 46, 47, 66, 67, 68, 69, 70, 71
*Elset, elset=C3D20
    3
**
** SURFACES
**
*Surface, type=ELEMENT, name=surf1
    C3D15, S5
*Surface, type=ELEMENT, name=surf2
    C3D8, S3
    C3D10, S2
    C3D20, S1
    C3D20, S2
    C3D20, S3
    C3D20, S4
    C3D20, S5
    C3D20, S6
*Surface, type=ELEMENT, name=surf3
    C3D4, S1
    C3D6, S2
**
** MATERIAL
**
*MATERIAL, NAME=default
    *DENSITY
        7800
    *ELASTIC, TYPE=ISO
        2e+11, 0.3
*SOLID SECTION, ELSET=ALL_e, MATERIAL=default
**
** STEP
**
*STEP, AMPLITUDE=RAMP
    *NO ANALYSIS
    *EL FILE, GLOBAL=YES, OUTPUT=3D
    *NODE FILE, GLOBAL=YES, OUTPUT=3D
    *BOUNDARY, OP=NEW
        ALL_n, 1, 6
    *END STEP
